// SBML level 2 version 3

model GPGeneratedModel()

  // Species:
  substanceOnly species Raf1Star in compartment = 0.025;
  substanceOnly species RKIP in compartment = 0.025;
  substanceOnly species Raf1Star|RKIP in compartment = 0;
  substanceOnly species ERKPP in compartment = 0;
  substanceOnly species Raf1Star|RKIP|ERKPP in compartment = 0;
  substanceOnly species ERK in compartment = 0.025;
  substanceOnly species RKIPP in compartment = 0;
  substanceOnly species MEKPP in compartment = 0.025;
  substanceOnly species MEKPP|ERK in compartment = 0;
  substanceOnly species RP in compartment = 0.03;
  substanceOnly species RP|RKIPP in compartment = 0;
  substanceOnly species RKIPP|RKIP in compartment = 0;
  substanceOnly species ERK|RKIP in compartment = 0;
  substanceOnly species RP|RP|RKIPP in compartment = 0;
  substanceOnly species MEKPP|Raf1Star|RKIP in compartment = 0;
  substanceOnly species ERK|MEKPP in compartment = 0;
  substanceOnly species RP|RKIPP|RKIPP in compartment = 0;
  substanceOnly species RP|RKIP in compartment = 0;
  substanceOnly species Raf1Star|RKIP|ERK in compartment = 0;
  substanceOnly species ERK|Raf1Star in compartment = 0;
  substanceOnly species RKIP|ERK in compartment = 0;
  substanceOnly species ERK|RP in compartment = 0;
  substanceOnly species RKIPP|RP|RKIPP in compartment = 0;
  substanceOnly species RKIPP|Raf1Star in compartment = 0;
  substanceOnly species MEKPP|RKIPP in compartment = 0;
  substanceOnly species ERK|RKIPP in compartment = 0;
  substanceOnly species RKIP|ERKPP in compartment = 0;
  substanceOnly species RKIP|MEKPP in compartment = 0;
  substanceOnly species Raf1Star|MEKPP|ERK in compartment = 0;
  substanceOnly species RP|RKIPP|Raf1Star|RKIP in compartment = 0;
  substanceOnly species ERKPP|RP in compartment = 0;
  substanceOnly species MEKPP|ERK|Raf1Star in compartment = 0;
  substanceOnly species Raf1Star|RKIP|ERKPP|MEKPP in compartment = 0;
  substanceOnly species RKIPP|MEKPP|ERK in compartment = 0;
  substanceOnly species Raf1Star|RKIP|ERKPP|MEKPP|ERK in compartment = 0;
  substanceOnly species Raf1Star|RKIP|ERKPP|ERK in compartment = 0;
  substanceOnly species Raf1Star|ERK in compartment = 0;
  substanceOnly species ERK|Raf1Star|RKIP in compartment = 0;
  substanceOnly species RP|RKIPP|Raf1Star in compartment = 0;
  substanceOnly species RKIP|RP|RKIPP in compartment = 0;
  substanceOnly species Raf1Star|RKIP|ERKPP|Raf1Star|RKIP in compartment = 0;
  substanceOnly species ERK|RP|RKIPP in compartment = 0;
  substanceOnly species Raf1Star|RKIP|ERKPP|RP in compartment = 0;
  substanceOnly species MEKPP|ERK|MEKPP in compartment = 0;
  substanceOnly species MEKPP|ERKPP in compartment = 0;
  substanceOnly species RP|RKIPP|ERKPP in compartment = 0;
  substanceOnly species MEKPP|ERK|Raf1Star|RKIP in compartment = 0;
  substanceOnly species Raf1Star|Raf1Star|RKIP in compartment = 0;
  substanceOnly species ERKPP|RKIPP in compartment = 0;
  substanceOnly species RP|ERK in compartment = 0;
  substanceOnly species RKIP|RKIPP in compartment = 0;
  substanceOnly species ERK|ERKPP in compartment = 0;
  substanceOnly species RP|RKIPP|MEKPP in compartment = 0;
  substanceOnly species ERKPP|MEKPP|ERK in compartment = 0;
  substanceOnly species RP|RKIPP|RKIP in compartment = 0;
  substanceOnly species RP|RKIPP|Raf1Star|RKIP|ERKPP in compartment = 0;
  substanceOnly species RKIP|MEKPP|ERK in compartment = 0;
  substanceOnly species RKIP|Raf1Star in compartment = 0;
  substanceOnly species Raf1Star|RKIP|RP|RKIPP in compartment = 0;
  substanceOnly species Raf1Star|RKIP|RKIPP in compartment = 0;
  substanceOnly species RKIP|Raf1Star|RKIP|ERKPP in compartment = 0;
  substanceOnly species ERK|Raf1Star|RKIP|ERKPP in compartment = 0;
  substanceOnly species Raf1Star|ERKPP in compartment = 0;
  substanceOnly species Raf1Star|RP in compartment = 0;
  substanceOnly species MEKPP|Raf1Star|RKIP|ERKPP in compartment = 0;
  substanceOnly species Raf1Star|RKIP|RP in compartment = 0;
  substanceOnly species ERKPP|Raf1Star in compartment = 0;
  substanceOnly species Raf1Star|RKIP|MEKPP|ERK in compartment = 0;
  substanceOnly species RP|RKIPP|ERK in compartment = 0;
  substanceOnly species ERKPP|Raf1Star|RKIP in compartment = 0;
  substanceOnly species RP|RKIPP|RP in compartment = 0;
  substanceOnly species RP|Raf1Star|RKIP|ERKPP in compartment = 0;
  substanceOnly species ERKPP|RKIP in compartment = 0;
  substanceOnly species ERKPP|ERK in compartment = 0;
  substanceOnly species RP|ERKPP in compartment = 0;
  substanceOnly species Raf1Star|RKIP|ERKPP|RKIP in compartment = 0;
  substanceOnly species RKIPP|Raf1Star|RKIP|ERKPP in compartment = 0;
  substanceOnly species RP|MEKPP in compartment = 0;
  substanceOnly species MEKPP|ERK|RP|RKIPP in compartment = 0;
  substanceOnly species Raf1Star|RKIP|ERKPP|Raf1Star in compartment = 0;
  substanceOnly species RP|RKIPP|MEKPP|ERK in compartment = 0;
  substanceOnly species MEKPP|ERK|RKIP in compartment = 0;
  substanceOnly species MEKPP|RKIP in compartment = 0;
  substanceOnly species RKIPP|ERK in compartment = 0;
  substanceOnly species Raf1Star|RKIP|ERKPP|ERKPP in compartment = 0;
  substanceOnly species MEKPP|MEKPP|ERK in compartment = 0;
  substanceOnly species Raf1Star|RKIP|MEKPP in compartment = 0;
  substanceOnly species ERKPP|Raf1Star|RKIP|ERKPP in compartment = 0;
  substanceOnly species RP|Raf1Star|RKIP in compartment = 0;
  substanceOnly species Raf1Star|Raf1Star|RKIP|ERKPP in compartment = 0;
  substanceOnly species MEKPP|RP in compartment = 0;
  substanceOnly species Raf1Star|RP|RKIPP in compartment = 0;
  substanceOnly species Raf1Star|RKIP|Raf1Star in compartment = 0;
  substanceOnly species ERKPP|MEKPP in compartment = 0;
  substanceOnly species Raf1Star|RKIP|ERKPP|RKIPP in compartment = 0;
  substanceOnly species MEKPP|ERK|ERK in compartment = 0;
  substanceOnly species RKIPP|ERKPP in compartment = 0;
  substanceOnly species RKIP|RP in compartment = 0;
  substanceOnly species MEKPP|Raf1Star in compartment = 0;
  substanceOnly species ERKPP|RP|RKIPP in compartment = 0;
  substanceOnly species RKIP|Raf1Star|RKIP in compartment = 0;
  substanceOnly species Raf1Star|RKIP|RKIP in compartment = 0;
  substanceOnly species MEKPP|ERK|ERKPP in compartment = 0;
  substanceOnly species RKIPP|RP in compartment = 0;
  substanceOnly species ERK|MEKPP|ERK in compartment = 0;
  substanceOnly species Raf1Star|RKIP|ERKPP|RP|RKIPP in compartment = 0;
  substanceOnly species MEKPP|RP|RKIPP in compartment = 0;
  substanceOnly species MEKPP|ERK|RKIPP in compartment = 0;
  substanceOnly species Raf1Star|MEKPP in compartment = 0;
  substanceOnly species RKIPP|Raf1Star|RKIP in compartment = 0;
  substanceOnly species RP|MEKPP|ERK in compartment = 0;
  substanceOnly species Raf1Star|RKIPP in compartment = 0;
  substanceOnly species MEKPP|ERK|RP in compartment = 0;
  substanceOnly species RP|Raf1Star in compartment = 0;
  substanceOnly species MEKPP|ERK|Raf1Star|RKIP|ERKPP in compartment = 0;
  substanceOnly species RKIPP|MEKPP in compartment = 0;
  substanceOnly species Raf1Star|RKIP|Raf1Star|RKIP|ERKPP in compartment = 0;

  // Parameters:
  k0 = 0.188555;
  k1 = 0.3885982;
  k2 = 0.2478423;
  k3 = 0.77153;
  k4 = 0.3848279;
  k5 = 0.03980053;
  k6 = 0.30977;
  k7 = 0.9823645;
  k8 = 0.08674767;
  k9 = 0.9353455;
  k10 = 0.7869279;
  k11 = 0.9856064;
  k12 = 0.6730806;
  k13 = 0.8363751;
  k14 = 0.5551338;
  k15 = 0.8640655;
  k16 = 0.6009849;
  k17 = 0.664506;
  k18 = 0.2058403;
  k19 = 0.431448;
  k20 = 0.6508804;
  k21 = 0.6385241;
  k22 = 0.3413872;
  k23 = 0.8518235;
  k24 = 0.6408874;
  k25 = 0.4229863;
  k26 = 0.658359;
  k27 = 0.02485083;
  k28 = 0.9026333;
  k29 = 0.1954175;
  k30 = 0.08456219;
  k31 = 0.3150589;
  k32 = 0.2907885;
  k33 = 0.9785673;
  k34 = 0.341813;
  k35 = 0.2950234;
  k36 = 0.7382498;
  k37 = 0.585897;
  k38 = 0.9526899;
  k39 = 0.9678349;
  k40 = 0.2936208;
  k41 = 0.6844623;
  k42 = 0.08744628;
  k43 = 0.7819422;
  k44 = 0.9609848;
  k45 = 0.5970479;
  k46 = 0.302342;
  k47 = 0.431812;
  k48 = 0.1732519;
  k49 = 0.3425985;
  k50 = 0.08946029;
  k51 = 0.9578392;
  k52 = 0.4290025;
  k53 = 0.2142313;
  k54 = 0.8839239;
  k55 = 0.268656;
  k56 = 0.5309484;
  k57 = 0.8050725;
  k58 = 0.4316177;
  k59 = 0.7400654;
  k60 = 0.9795294;
  k61 = 0.711015;
  k62 = 0.2234094;
  k63 = 0.9059222;
  k64 = 0.432722;
  k65 = 0.9183573;
  k66 = 0.7712739;
  k67 = 0.0002869048;
  k68 = 0.6676918;
  k69 = 0.5133408;
  k70 = 0.3540812;
  k71 = 0.3575049;
  k72 = 0.5945732;
  k73 = 0.6308834;
  k74 = 0.5335986;
  k75 = 0.4575083;
  k76 = 0.6111793;
  k77 = 0.8057098;
  k78 = 0.4748215;
  k79 = 0.7572621;
  k80 = 0.6043538;
  k81 = 0.5612432;
  k82 = 0.05032013;
  k83 = 0.2107427;
  k84 = 0.05430812;
  k85 = 0.7413497;
  k86 = 0.08538266;
  k87 = 0.1347915;
  k88 = 0.4169551;
  k89 = 0.4834234;
  k90 = 0.852658;
  k91 = 0.3922227;
  k92 = 0.5793525;
  k93 = 0.5168383;
  k94 = 0.8075168;
  k95 = 0.6741298;
  k96 = 0.3734512;
  k97 = 0.2249021;
  k98 = 0.7447658;
  k99 = 0.5541427;
  k100 = 0.1404663;
  k101 = 0.7687397;
  k102 = 0.6956268;
  k103 = 0.3770281;
  k104 = 0.621828;
  k105 = 0.776682;
  k106 = 0.4008589;
  k107 = 0.4979719;
  k108 = 0.5723089;
  k109 = 0.3989105;
  k110 = 0.8653175;
  k111 = 0.08923812;
  k112 = 0.4532033;
  k113 = 0.7241009;
  k114 = 0.9396582;
  k115 = 0.1969579;
  k116 = 0.9154027;
  k117 = 0.01429908;
  k118 = 0.3275422;
  k119 = 0.6425637;
  k120 = 0.7228022;
  k121 = 0.8446068;
  k122 = 0.6639317;
  k123 = 0.8690173;
  k124 = 0.1550466;
  k125 = 0.9012573;
  k126 = 0.7598062;
  k127 = 0.4737577;
  k128 = 0.8363973;
  k129 = 0.5922457;
  k130 = 0.2567432;
  k131 = 0.1269041;
  k132 = 0.9112248;
  k133 = 0.107334;
  k134 = 0.9830057;
  k135 = 0.03408671;
  k136 = 0.6591705;
  k137 = 0.3795046;
  k138 = 0.2192811;
  k139 = 0.5599254;
  k140 = 0.9941398;
  k141 = 0.5913793;
  k142 = 0.7499349;
  k143 = 0.626807;
  k144 = 0.2280368;
  k145 = 0.2149498;
  k146 = 0.9260584;
  k147 = 0.2827978;
  k148 = 0.4840909;
  k149 = 0.06234769;
  k150 = 0.2320801;
  k151 = 0.9446796;
  k152 = 0.02712115;
  k153 = 0.2188991;
  k154 = 0.5614601;
  k155 = 0.8921781;
  k156 = 0.4222292;
  k157 = 0.7730398;
  k158 = 0.06857831;
  k159 = 0.3338086;
  k160 = 0.749117;
  k161 = 0.974494;
  k162 = 0.2670293;
  k163 = 0.3665803;
  k164 = 0.4320372;
  k165 = 0.5676655;
  k166 = 0.5214243;
  k167 = 0.2202116;
  k168 = 0.07710574;
  k169 = 0.6623573;
  k170 = 0.4665725;
  k171 = 0.7495483;
  k172 = 0.859075;
  k173 = 0.7635533;
  k174 = 0.2223609;
  k175 = 0.7970862;
  k176 = 0.8202918;
  k177 = 0.8229571;
  k178 = 0.6114604;
  k179 = 0.9777493;
  k180 = 0.3709319;
  k181 = 0.3413887;
  k182 = 0.2264085;
  k183 = 0.4577488;
  k184 = 0.1222737;
  k185 = 0.3681582;
  k186 = 0.5994197;
  k187 = 0.3919036;
  k188 = 0.8172358;
  k189 = 0.7794624;
  k190 = 0.398622;
  k191 = 0.4801859;
  k192 = 0.5587901;
  k193 = 0.8591526;
  k194 = 0.7095109;
  k195 = 0.3982601;
  k196 = 0.631496;
  k197 = 0.1546245;
  k198 = 0.223151;
  k199 = 0.6649346;
  k200 = 0.3914415;
  k201 = 0.9082463;
  k202 = 0.8053423;
  k203 = 0.7895161;
  k204 = 0.06203106;
  k205 = 0.8511664;
  k206 = 0.473015;
  k207 = 0.3002656;
  k208 = 0.2917198;
  k209 = 0.848024;
  k210 = 0.5649963;
  k211 = 0.0427406;
  k212 = 0.1375373;
  k213 = 0.07885802;
  k214 = 0.9296999;
  k215 = 0.4721875;
  k216 = 0.8503495;
  k217 = 0.3594754;
  k218 = 0.357963;
  k219 = 0.8999323;
  k220 = 0.9540806;
  k221 = 0.611204;
  k222 = 0.2042662;
  k223 = 0.6528175;
  k224 = 0.4304799;
  k225 = 0.7124302;
  k226 = 0.2514374;
  k227 = 0.6254591;
  k228 = 0.6022759;
  k229 = 0.3088324;
  k230 = 0.8900774;
  k231 = 0.8149793;
  k232 = 0.4510605;
  k233 = 0.6499448;
  k234 = 0.1517374;
  k235 = 0.2736172;
  k236 = 0.2653884;
  k237 = 0.309886;
  k238 = 0.652436;
  k239 = 0.4572449;
  k240 = 0.3337509;
  k241 = 0.2838881;
  k242 = 0.838512;
  k243 = 0.1157737;
  k244 = 0.1145072;
  k245 = 0.9116413;
  k246 = 0.6761379;
  k247 = 0.9096479;
  k248 = 0.7672453;
  k249 = 0.06975266;
  k250 = 0.6624308;
  k251 = 0.0502872;
  k252 = 0.08477477;
  k253 = 0.6006466;
  k254 = 0.5770714;
  k255 = 0.7768319;
  k256 = 0.2350387;
  k257 = 0.8337938;
  k258 = 0.8559522;
  k259 = 0.2222017;
  k260 = 0.09225363;
  k261 = 0.1144484;
  k262 = 0.3472779;
  k263 = 0.6051153;
  k264 = 0.645239;
  k265 = 0.07705458;
  k266 = 0.7704383;
  k267 = 0.2183387;
  k268 = 0.6907028;
  k269 = 0.4337953;
  k270 = 0.8954108;
  k271 = 0.5029506;
  k272 = 0.200865;
  k273 = 0.7853646;
  k274 = 0.03737619;
  k275 = 0.6476432;
  k276 = 0.1095135;
  k277 = 0.7222258;
  k278 = 0.7486007;
  k279 = 0.2269546;
  k280 = 0.3877055;
  k281 = 0.6437104;
  k282 = 0.688641;
  k283 = 0.7617723;
  k284 = 0.2059391;
  k285 = 0.8996161;
  k286 = 0.1716284;
  k287 = 0.4200531;
  k288 = 0.9763854;
  k289 = 0.4800413;
  k290 = 0.6054537;
  k291 = 0.7135471;
  k292 = 0.0313467;
  k293 = 0.5648374;
  k294 = 0.4439639;
  k295 = 0.3611413;
  k296 = 0.6382307;
  k297 = 0.691613;
  k298 = 0.1534737;
  k299 = 0.6114879;
  k300 = 0.0679828;
  k301 = 0.8929429;
  k302 = 0.2585222;
  k303 = 0.7026906;
  k304 = 0.3785183;
  k305 = 0.5232171;
  k306 = 0.4196845;
  k307 = 0.5622936;
  k308 = 0.5117772;
  k309 = 0.7871142;
  k310 = 0.6777096;
  k311 = 0.3760163;
  k312 = 0.7628213;
  k313 = 0.2044444;
  k314 = 0.1199222;
  k315 = 0.3574026;
  k316 = 0.3968336;
  k317 = 0.8982128;
  k318 = 0.6348706;
  k319 = 0.8667428;
  k320 = 0.8902047;
  k321 = 0.04536832;
  k322 = 0.5080623;
  k323 = 0.8307487;
  k324 = 0.124073;
  k325 = 0.9015292;
  k326 = 0.6383367;
  k327 = 0.9847506;
  k328 = 0.4726634;
  k329 = 0.08596147;
  k330 = 0.7941919;
  k331 = 0.05338634;
  k332 = 0.4092603;
  k333 = 0.0008612732;
  k334 = 0.9932486;
  k335 = 0.3319194;
  k336 = 0.9171278;
  k337 = 0.6226619;
  k338 = 0.04119631;
  k339 = 0.08011161;
  k340 = 0.7569221;
  k341 = 0.5791558;
  k342 = 0.2337843;
  k343 = 0.5193081;
  k344 = 0.4361105;
  k345 = 0.380486;
  k346 = 0.5591636;
  k347 = 0.8287008;
  k348 = 0.6641175;
  k349 = 0.5063814;
  k350 = 0.2758097;
  k351 = 0.7215417;
  k352 = 0.860771;
  k353 = 0.3986925;
  k354 = 0.6366843;
  k355 = 0.5204361;
  k356 = 0.5517475;
  k357 = 0.2963823;
  k358 = 0.2448503;
  k359 = 0.2306581;
  k360 = 0.1557548;
  k361 = 0.7213939;
  k362 = 0.6976512;
  k363 = 0.4125497;
  k364 = 0.6424966;
  k365 = 0.8015367;
  k366 = 0.6858995;
  k367 = 0.3635951;
  k368 = 0.2048467;
  k369 = 0.9668731;
  k370 = 0.7139893;
  k371 = 0.8942556;
  k372 = 0.5646292;
  k373 = 0.5578397;
  k374 = 0.06724655;
  k375 = 0.4639408;
  k376 = 0.2609644;
  k377 = 0.4436545;
  k378 = 0.08709034;
  k379 = 0.4058354;
  k380 = 0.7885806;
  k381 = 0.4902027;
  k382 = 0.3232644;
  k383 = 0.4663129;
  k384 = 0.4950769;
  k385 = 0.1451636;
  k386 = 0.4202687;
  k387 = 0.1940237;
  k388 = 0.5083115;
  k389 = 0.8669663;
  k390 = 0.4062142;
  k391 = 0.2878854;
  k392 = 0.9752025;
  k393 = 0.2567618;
  k394 = 0.5187975;
  k395 = 0.82737;
  k396 = 0.2707585;
  k397 = 0.178264;
  k398 = 0.6175656;
  k399 = 0.8674042;
  k400 = 0.3309186;
  k401 = 0.7874995;
  k402 = 0.6650006;
  k403 = 0.2883563;
  k404 = 0.5003057;
  k405 = 0.1937001;
  k406 = 0.8309882;
  k407 = 0.5742269;
  k408 = 0.5742634;
  k409 = 0.3148815;
  k410 = 0.5790451;
  k411 = 0.4686193;
  k412 = 0.6892308;
  k413 = 0.4480106;
  k414 = 0.2930801;
  k415 = 0.2371994;
  k416 = 0.5541397;
  k417 = 0.4485943;
  k418 = 0.8560022;
  k419 = 0.05910256;
  k420 = 0.9906676;
  k421 = 0.4268578;
  k422 = 0.2332645;
  k423 = 0.9793448;
  k424 = 0.1483938;
  k425 = 0.6310789;
  k426 = 0.2344195;
  k427 = 0.1906184;
  k428 = 0.2393907;
  k429 = 0.5598341;
  k430 = 0.9919089;
  k431 = 0.09830942;
  k432 = 0.4082901;
  k433 = 0.3623219;
  k434 = 0.07363395;
  k435 = 0.4346402;
  k436 = 0.04264348;
  k437 = 0.8442393;
  k438 = 0.9941598;
  k439 = 0.7806283;
  k440 = 0.2119533;
  k441 = 0.9121823;
  k442 = 0.338442;
  k443 = 0.3573091;
  k444 = 0.5981931;
  k445 = 0.8357416;
  k446 = 0.9938714;
  k447 = 0.1462416;
  k448 = 0.6475032;
  k449 = 0.3647611;
  k450 = 0.4243577;
  k451 = 0.277672;
  k452 = 0.7570956;
  k453 = 0.3469739;
  k454 = 0.9243172;
  k455 = 0.8055008;
  k456 = 0.3473049;
  k457 = 0.9477433;
  k458 = 0.915986;
  k459 = 0.5664186;
  k460 = 0.149451;
  k461 = 0.02242526;
  k462 = 0.6106581;
  k463 = 0.570979;
  k464 = 0.7049611;
  k465 = 0.3768755;
  k466 = 0.5847374;
  k467 = 0.5080637;
  k468 = 0.3243341;
  k469 = 0.003333243;
  k470 = 0.2281378;
  k471 = 0.5083135;
  k472 = 0.6330161;
  k473 = 0.1244931;
  k474 = 0.8665424;
  k475 = 0.01799834;
  k476 = 0.6834929;
  k477 = 0.1522069;
  k478 = 0.4629886;
  k479 = 0.6989403;
  k480 = 0.7882859;
  k481 = 0.793376;
  k482 = 0.2286353;
  k483 = 0.9112033;
  k484 = 0.6789516;
  k485 = 0.8430538;
  k486 = 0.9837805;
  k487 = 0.03149495;
  k488 = 0.5396354;
  k489 = 0.04098035;
  k490 = 0.5027404;
  k491 = 0.5731712;
  k492 = 0.2373802;
  k493 = 0.491673;
  k494 = 0.569856;
  k495 = 0.4766251;
  k496 = 0.2378606;
  k497 = 0.2674419;
  k498 = 0.728423;
  k499 = 0.7587066;
  k500 = 0.01883567;
  k501 = 0.6387248;
  k502 = 0.7300439;
  k503 = 0.2629372;
  k504 = 0.6004052;
  k505 = 0.6067742;
  k506 = 0.3190582;
  k507 = 0.4367971;
  k508 = 0.7029953;
  k509 = 0.5355944;
  k510 = 0.7301981;
  k511 = 0.3042673;
  k512 = 0.04000462;

  // Reactions:
  r0: ERKPP|Raf1Star|RKIP => RKIPP|Raf1Star|RKIP; k0*ERKPP|Raf1Star|RKIP;
  r1: Raf1Star|RP|RKIPP => RKIP|RP|RKIPP; k1*Raf1Star|RP|RKIPP;
  r2: RP|ERKPP => RP + ERKPP; k2*RP|ERKPP;
  r3: RP|RKIPP => RP + RKIPP; k3*RP|RKIPP;
  r4: RKIPP + ERKPP => RKIPP|ERKPP; k4*RKIPP*ERKPP;
  r5: RKIPP|ERKPP => RP|RKIPP|ERKPP; k5*RKIPP|ERKPP;
  r6: RKIPP|MEKPP => RP|RKIPP|MEKPP; k6*RKIPP|MEKPP;
  r7: Raf1Star|RKIP|ERKPP|RP => MEKPP|ERK|RP; k7*Raf1Star|RKIP|ERKPP|RP;
  r8: RP|RKIPP|Raf1Star|RKIP => MEKPP|Raf1Star|RKIP; k8*RP|RKIPP|Raf1Star|RKIP;
  r9: RKIPP|Raf1Star|RKIP => MEKPP|Raf1Star|RKIP; k9*RKIPP|Raf1Star|RKIP;
  r10: MEKPP|ERK|MEKPP => RP|RKIPP|MEKPP; k10*MEKPP|ERK|MEKPP;
  r11: MEKPP|ERK|RKIPP => RP|RKIPP|RKIPP; k11*MEKPP|ERK|RKIPP;
  r12: MEKPP|ERK|Raf1Star|RKIP|ERKPP => MEKPP|ERK + Raf1Star|RKIP|ERKPP; k12*MEKPP|ERK|Raf1Star|RKIP|ERKPP;
  r13: RKIP|MEKPP|ERK => RP|MEKPP|ERK; k13*RKIP|MEKPP|ERK;
  r14: ERKPP|MEKPP => Raf1Star|RKIP|MEKPP; k14*ERKPP|MEKPP;
  r15: RP|ERKPP => MEKPP|ERK|ERKPP; k15*RP|ERKPP;
  r16: RP|RKIPP => MEKPP|ERK|RKIPP; k16*RP|RKIPP;
  r17: RP|RKIPP => ERKPP|RKIPP; k17*RP|RKIPP;
  r18: RKIPP|RKIP => MEKPP|RKIP; k18*RKIPP|RKIP;
  r19: ERKPP|Raf1Star|RKIP|ERKPP => ERKPP + Raf1Star|RKIP|ERKPP; k19*ERKPP|Raf1Star|RKIP|ERKPP;
  r20: ERK|MEKPP|ERK => ERK + MEKPP|ERK; k20*ERK|MEKPP|ERK;
  r21: Raf1Star|MEKPP => Raf1Star|RKIP|ERKPP|MEKPP; k21*Raf1Star|MEKPP;
  r22: Raf1Star|RP => Raf1Star|RKIP|RP; k22*Raf1Star|RP;
  r23: RKIP|Raf1Star|RKIP => ERKPP|Raf1Star|RKIP; k23*RKIP|Raf1Star|RKIP;
  r24: RKIP|MEKPP => Raf1Star|RKIP|MEKPP; k24*RKIP|MEKPP;
  r25: RKIP|RKIPP => Raf1Star|RKIP|RKIPP; k25*RKIP|RKIPP;
  r26: RKIP|RP|RKIPP => RP|RP|RKIPP; k26*RKIP|RP|RKIPP;
  r27: RP|RKIPP + MEKPP|ERK => RP|RKIPP|MEKPP|ERK; k27*RP|RKIPP*MEKPP|ERK;
  r28: MEKPP|RP|RKIPP => Raf1Star|RKIP|ERKPP|RP|RKIPP; k28*MEKPP|RP|RKIPP;
  r29: MEKPP|Raf1Star => Raf1Star|RKIP|ERKPP|Raf1Star; k29*MEKPP|Raf1Star;
  r30: MEKPP|ERK|ERK => RKIP|ERK; k30*MEKPP|ERK|ERK;
  r31: Raf1Star|RKIP|ERKPP|ERKPP => RKIP|ERKPP; k31*Raf1Star|RKIP|ERKPP|ERKPP;
  r32: Raf1Star|RKIP|ERKPP|MEKPP => RKIP|MEKPP; k32*Raf1Star|RKIP|ERKPP|MEKPP;
  r33: ERK|RP => RP|RKIPP|RP; k33*ERK|RP;
  r34: Raf1Star|RKIP + RP|RKIPP => Raf1Star|RKIP|RP|RKIPP; k34*Raf1Star|RKIP*RP|RKIPP;
  r35: RP|RKIP => RP + RKIP; k35*RP|RKIP;
  r36: ERKPP|ERK => RP|RKIPP|ERK; k36*ERKPP|ERK;
  r37: ERK|Raf1Star|RKIP|ERKPP => Raf1Star|RKIP|Raf1Star|RKIP|ERKPP; k37*ERK|Raf1Star|RKIP|ERKPP;
  r38: RKIP + ERK => RKIP|ERK; k38*RKIP*ERK;
  r39: Raf1Star|RKIP|ERKPP|ERKPP => RP|RKIPP|ERKPP; k39*Raf1Star|RKIP|ERKPP|ERKPP;
  r40: Raf1Star|RKIP|ERKPP|MEKPP => RP|RKIPP|MEKPP; k40*Raf1Star|RKIP|ERKPP|MEKPP;
  r41: Raf1Star|RKIP|RP|RKIPP => Raf1Star|RKIP|ERKPP|RP|RKIPP; k41*Raf1Star|RKIP|RP|RKIPP;
  r42: RKIPP + MEKPP|ERK => RKIPP|MEKPP|ERK; k42*RKIPP*MEKPP|ERK;
  r43: RP|RKIPP|RP => RKIPP|RP; k43*RP|RKIPP|RP;
  r44: MEKPP|ERK|RKIP => Raf1Star|RKIP; k44*MEKPP|ERK|RKIP;
  r45: MEKPP|RKIP => RP|RKIP; k45*MEKPP|RKIP;
  r46: Raf1Star|RKIP|ERKPP|MEKPP|ERK => RKIPP|MEKPP|ERK; k46*Raf1Star|RKIP|ERKPP|MEKPP|ERK;
  r47: Raf1Star|RKIPP => MEKPP|ERK|RKIPP; k47*Raf1Star|RKIPP;
  r48: RP|ERKPP => RP|RKIPP|ERKPP; k48*RP|ERKPP;
  r49: RKIPP|RP|RKIPP => ERKPP|RP|RKIPP; k49*RKIPP|RP|RKIPP;
  r50: RKIPP|Raf1Star => ERKPP|Raf1Star; k50*RKIPP|Raf1Star;
  r51: MEKPP|Raf1Star|RKIP|ERKPP => Raf1Star|RKIP|Raf1Star|RKIP|ERKPP; k51*MEKPP|Raf1Star|RKIP|ERKPP;
  r52: RKIP|ERKPP => RP|ERKPP; k52*RKIP|ERKPP;
  r53: Raf1Star|ERK => Raf1Star|RKIP|ERK; k53*Raf1Star|ERK;
  r54: RKIPP|MEKPP|ERK => Raf1Star|MEKPP|ERK; k54*RKIPP|MEKPP|ERK;
  r55: Raf1Star|RKIP|MEKPP|ERK => RP|RKIPP|MEKPP|ERK; k55*Raf1Star|RKIP|MEKPP|ERK;
  r56: RP|RKIPP|MEKPP => Raf1Star|RKIP|MEKPP; k56*RP|RKIPP|MEKPP;
  r57: RP|Raf1Star|RKIP|ERKPP => ERK|Raf1Star|RKIP|ERKPP; k57*RP|Raf1Star|RKIP|ERKPP;
  r58: RKIPP|RP => RKIP|RP; k58*RKIPP|RP;
  r59: MEKPP|RP => Raf1Star|RKIP|ERKPP|RP; k59*MEKPP|RP;
  r60: RP|MEKPP|ERK => RKIPP|MEKPP|ERK; k60*RP|MEKPP|ERK;
  r61: Raf1Star|RKIP|ERKPP + ERKPP => Raf1Star|RKIP|ERKPP|ERKPP; k61*Raf1Star|RKIP|ERKPP*ERKPP;
  r62: RP|Raf1Star|RKIP => Raf1Star|RKIP|ERKPP|Raf1Star|RKIP; k62*RP|Raf1Star|RKIP;
  r63: RKIPP|Raf1Star|RKIP => MEKPP|ERK|Raf1Star|RKIP; k63*RKIPP|Raf1Star|RKIP;
  r64: RP|RKIPP|Raf1Star|RKIP|ERKPP => RP|RKIPP + Raf1Star|RKIP|ERKPP; k64*RP|RKIPP|Raf1Star|RKIP|ERKPP;
  r65: RP|RKIPP|Raf1Star|RKIP|ERKPP => Raf1Star|RKIP|Raf1Star|RKIP|ERKPP; k65*RP|RKIPP|Raf1Star|RKIP|ERKPP;
  r66: ERKPP|ERK => ERKPP + ERK; k66*ERKPP|ERK;
  r67: MEKPP|ERK|RP => MEKPP|RP; k67*MEKPP|ERK|RP;
  r68: RKIPP|MEKPP => Raf1Star|RKIP|MEKPP; k68*RKIPP|MEKPP;
  r69: MEKPP|ERKPP => RKIPP|ERKPP; k69*MEKPP|ERKPP;
  r70: RP|ERKPP => RKIPP|ERKPP; k70*RP|ERKPP;
  r71: MEKPP|ERK|RKIPP => MEKPP|ERK + RKIPP; k71*MEKPP|ERK|RKIPP;
  r72: RKIPP|ERK => Raf1Star|ERK; k72*RKIPP|ERK;
  r73: MEKPP|ERK|ERK => RKIPP|ERK; k73*MEKPP|ERK|ERK;
  r74: Raf1Star|RKIP|RP|RKIPP => RKIP|RP|RKIPP; k74*Raf1Star|RKIP|RP|RKIPP;
  r75: Raf1Star|RKIP|Raf1Star => RKIP|Raf1Star; k75*Raf1Star|RKIP|Raf1Star;
  r76: RKIP|RP => Raf1Star|RKIP|ERKPP|RP; k76*RKIP|RP;
  r77: Raf1Star|RKIP|MEKPP|ERK => Raf1Star|MEKPP|ERK; k77*Raf1Star|RKIP|MEKPP|ERK;
  r78: Raf1Star|RKIP|ERKPP|ERKPP => RKIPP|ERKPP; k78*Raf1Star|RKIP|ERKPP|ERKPP;
  r79: MEKPP|ERK|RP => ERKPP|RP; k79*MEKPP|ERK|RP;
  r80: MEKPP|RP => MEKPP + RP; k80*MEKPP|RP;
  r81: ERKPP|RP => Raf1Star|RKIP|RP; k81*ERKPP|RP;
  r82: RP|RKIPP|Raf1Star|RKIP|ERKPP => ERK|Raf1Star|RKIP|ERKPP; k82*RP|RKIPP|Raf1Star|RKIP|ERKPP;
  r83: RKIP|ERK => RP|ERK; k83*RKIP|ERK;
  r84: MEKPP|Raf1Star|RKIP|ERKPP => ERKPP|Raf1Star|RKIP|ERKPP; k84*MEKPP|Raf1Star|RKIP|ERKPP;
  r85: RKIP|Raf1Star|RKIP|ERKPP => RKIPP|Raf1Star|RKIP|ERKPP; k85*RKIP|Raf1Star|RKIP|ERKPP;
  r86: ERKPP|ERK => MEKPP|ERK|ERK; k86*ERKPP|ERK;
  r87: ERKPP|MEKPP|ERK => Raf1Star|MEKPP|ERK; k87*ERKPP|MEKPP|ERK;
  r88: Raf1Star|RKIP + RKIPP => Raf1Star|RKIP|RKIPP; k88*Raf1Star|RKIP*RKIPP;
  r89: ERK|Raf1Star|RKIP => MEKPP|ERK|Raf1Star|RKIP; k89*ERK|Raf1Star|RKIP;
  r90: ERK|Raf1Star|RKIP => MEKPP|Raf1Star|RKIP; k90*ERK|Raf1Star|RKIP;
  r91: RKIP|RKIPP => MEKPP|ERK|RKIPP; k91*RKIP|RKIPP;
  r92: RKIP|MEKPP => MEKPP|ERK|MEKPP; k92*RKIP|MEKPP;
  r93: ERKPP|RKIPP => ERK|RKIPP; k93*ERKPP|RKIPP;
  r94: Raf1Star|RKIPP => Raf1Star|RKIP|RKIPP; k94*Raf1Star|RKIPP;
  r95: Raf1Star|RKIP|Raf1Star => MEKPP|Raf1Star; k95*Raf1Star|RKIP|Raf1Star;
  r96: RP + ERK => RP|ERK; k96*RP*ERK;
  r97: RP|RKIPP|Raf1Star|RKIP|ERKPP => MEKPP|ERK|Raf1Star|RKIP|ERKPP; k97*RP|RKIPP|Raf1Star|RKIP|ERKPP;
  r98: Raf1Star|RKIP|ERKPP|MEKPP => ERK|MEKPP; k98*Raf1Star|RKIP|ERKPP|MEKPP;
  r99: ERKPP|MEKPP|ERK => RKIP|MEKPP|ERK; k99*ERKPP|MEKPP|ERK;
  r100: Raf1Star|RKIP|ERKPP|RKIP => ERK|RKIP; k100*Raf1Star|RKIP|ERKPP|RKIP;
  r101: Raf1Star|RKIP|ERKPP + MEKPP|ERK => Raf1Star|RKIP|ERKPP|MEKPP|ERK; k101*Raf1Star|RKIP|ERKPP*MEKPP|ERK;
  r102: Raf1Star|RKIP|ERKPP|MEKPP|ERK => Raf1Star|MEKPP|ERK; k102*Raf1Star|RKIP|ERKPP|MEKPP|ERK;
  r103: Raf1Star|RKIP|ERKPP|MEKPP => Raf1Star|RKIP|MEKPP; k103*Raf1Star|RKIP|ERKPP|MEKPP;
  r104: Raf1Star + MEKPP|ERK => Raf1Star|MEKPP|ERK; k104*Raf1Star*MEKPP|ERK;
  r105: RKIPP|RP => ERK|RP; k105*RKIPP|RP;
  r106: ERKPP + RP => ERKPP|RP; k106*ERKPP*RP;
  r107: RP|RKIPP|Raf1Star|RKIP => MEKPP|ERK|Raf1Star|RKIP; k107*RP|RKIPP|Raf1Star|RKIP;
  r108: RKIPP|ERK => MEKPP|ERK; k108*RKIPP|ERK;
  r109: ERK + RKIP => ERK|RKIP; k109*ERK*RKIP;
  r110: RKIP|MEKPP|ERK => Raf1Star|RKIP|MEKPP|ERK; k110*RKIP|MEKPP|ERK;
  r111: RP|RKIPP|ERK => RP|RKIPP + ERK; k111*RP|RKIPP|ERK;
  r112: MEKPP|ERK|ERK => Raf1Star|RKIP|ERKPP|ERK; k112*MEKPP|ERK|ERK;
  r113: Raf1Star|ERK => MEKPP|ERK|ERK; k113*Raf1Star|ERK;
  r114: RP|RKIP => RKIPP|RKIP; k114*RP|RKIP;
  r115: RKIPP|Raf1Star|RKIP => RP|Raf1Star|RKIP; k115*RKIPP|Raf1Star|RKIP;
  r116: RP|MEKPP|ERK => Raf1Star|MEKPP|ERK; k116*RP|MEKPP|ERK;
  r117: RP|Raf1Star|RKIP|ERKPP => RP|RKIPP|Raf1Star|RKIP|ERKPP; k117*RP|Raf1Star|RKIP|ERKPP;
  r118: Raf1Star|RKIPP => RP|RKIPP|RKIPP; k118*Raf1Star|RKIPP;
  r119: RKIP|MEKPP => ERK|MEKPP; k119*RKIP|MEKPP;
  r120: ERK|RP => MEKPP|ERK|RP; k120*ERK|RP;
  r121: RP|RKIPP|MEKPP|ERK => Raf1Star|MEKPP|ERK; k121*RP|RKIPP|MEKPP|ERK;
  r122: MEKPP|ERK|RP|RKIPP => RKIP|RP|RKIPP; k122*MEKPP|ERK|RP|RKIPP;
  r123: MEKPP|ERK|Raf1Star => RKIP|Raf1Star; k123*MEKPP|ERK|Raf1Star;
  r124: RP|MEKPP|ERK => Raf1Star|RKIP|MEKPP|ERK; k124*RP|MEKPP|ERK;
  r125: ERKPP|RKIP => RKIPP|RKIP; k125*ERKPP|RKIP;
  r126: ERK|Raf1Star|RKIP => ERK + Raf1Star|RKIP; k126*ERK|Raf1Star|RKIP;
  r127: MEKPP|Raf1Star|RKIP|ERKPP => RP|Raf1Star|RKIP|ERKPP; k127*MEKPP|Raf1Star|RKIP|ERKPP;
  r128: RKIP|MEKPP => RKIP + MEKPP; k128*RKIP|MEKPP;
  r129: RP|Raf1Star|RKIP => Raf1Star|Raf1Star|RKIP; k129*RP|Raf1Star|RKIP;
  r130: ERK|RKIPP => RP|RKIPP|RKIPP; k130*ERK|RKIPP;
  r131: Raf1Star|ERK => ERKPP|ERK; k131*Raf1Star|ERK;
  r132: Raf1Star|RKIP|MEKPP|ERK => Raf1Star|RKIP + MEKPP|ERK; k132*Raf1Star|RKIP|MEKPP|ERK;
  r133: ERKPP|RP => RKIP|RP; k133*ERKPP|RP;
  r134: MEKPP|ERK|Raf1Star|RKIP|ERKPP => ERK|Raf1Star|RKIP|ERKPP; k134*MEKPP|ERK|Raf1Star|RKIP|ERKPP;
  r135: RKIPP|Raf1Star => RP|Raf1Star; k135*RKIPP|Raf1Star;
  r136: Raf1Star|RKIP|ERKPP|Raf1Star|RKIP => Raf1Star|Raf1Star|RKIP; k136*Raf1Star|RKIP|ERKPP|Raf1Star|RKIP;
  r137: Raf1Star|Raf1Star|RKIP|ERKPP => Raf1Star|RKIP|Raf1Star|RKIP|ERKPP; k137*Raf1Star|Raf1Star|RKIP|ERKPP;
  r138: RP|Raf1Star|RKIP => RKIP|Raf1Star|RKIP; k138*RP|Raf1Star|RKIP;
  r139: Raf1Star|RKIP|RP|RKIPP => ERKPP|RP|RKIPP; k139*Raf1Star|RKIP|RP|RKIPP;
  r140: ERKPP|RKIP => RP|RKIPP|RKIP; k140*ERKPP|RKIP;
  r141: RP|RKIPP|Raf1Star|RKIP => RKIPP|Raf1Star|RKIP; k141*RP|RKIPP|Raf1Star|RKIP;
  r142: RP|RKIPP|Raf1Star => MEKPP|ERK|Raf1Star; k142*RP|RKIPP|Raf1Star;
  r143: RKIP|MEKPP => RP|RKIPP|MEKPP; k143*RKIP|MEKPP;
  r144: RKIPP + RP => RKIPP|RP; k144*RKIPP*RP;
  r145: RP|RKIPP|MEKPP|ERK => ERKPP|MEKPP|ERK; k145*RP|RKIPP|MEKPP|ERK;
  r146: Raf1Star|RP => RP|RKIPP|RP; k146*Raf1Star|RP;
  r147: Raf1Star|RKIP|ERKPP|RP => Raf1Star|RP; k147*Raf1Star|RKIP|ERKPP|RP;
  r148: Raf1Star|RKIP|RP => RP|RKIPP|RP; k148*Raf1Star|RKIP|RP;
  r149: RKIPP|Raf1Star|RKIP|ERKPP => Raf1Star|RKIP|Raf1Star|RKIP|ERKPP; k149*RKIPP|Raf1Star|RKIP|ERKPP;
  r150: RP|RKIPP|MEKPP|ERK => Raf1Star|RKIP|ERKPP|MEKPP|ERK; k150*RP|RKIPP|MEKPP|ERK;
  r151: ERK|ERKPP => Raf1Star|RKIP|ERKPP; k151*ERK|ERKPP;
  r152: MEKPP|ERK + RKIP => MEKPP|ERK|RKIP; k152*MEKPP|ERK*RKIP;
  r153: Raf1Star + RKIPP => Raf1Star|RKIPP; k153*Raf1Star*RKIPP;
  r154: RP|RKIPP|MEKPP|ERK => ERK|MEKPP|ERK; k154*RP|RKIPP|MEKPP|ERK;
  r155: Raf1Star|RKIP|MEKPP|ERK => RKIPP|MEKPP|ERK; k155*Raf1Star|RKIP|MEKPP|ERK;
  r156: Raf1Star|RKIP|ERKPP|Raf1Star => RKIPP|Raf1Star; k156*Raf1Star|RKIP|ERKPP|Raf1Star;
  r157: Raf1Star|RKIP|ERKPP|MEKPP|ERK => Raf1Star|RKIP|MEKPP|ERK; k157*Raf1Star|RKIP|ERKPP|MEKPP|ERK;
  r158: RP|RKIP => Raf1Star|RKIP|ERKPP|RKIP; k158*RP|RKIP;
  r159: ERKPP|MEKPP|ERK => RP|MEKPP|ERK; k159*ERKPP|MEKPP|ERK;
  r160: Raf1Star|RKIPP => RKIP|RKIPP; k160*Raf1Star|RKIPP;
  r161: Raf1Star|Raf1Star|RKIP => RP|RKIPP|Raf1Star|RKIP; k161*Raf1Star|Raf1Star|RKIP;
  r162: RKIPP|RKIP => RP|RKIPP|RKIP; k162*RKIPP|RKIP;
  r163: Raf1Star + RKIP => Raf1Star|RKIP; k163*Raf1Star*RKIP;
  r164: MEKPP|ERKPP => RP|ERKPP; k164*MEKPP|ERKPP;
  r165: MEKPP|RKIPP => RP|RKIPP; k165*MEKPP|RKIPP;
  r166: RKIPP|RKIP => Raf1Star|RKIP; k166*RKIPP|RKIP;
  r167: MEKPP|RP|RKIPP => Raf1Star|RP|RKIPP; k167*MEKPP|RP|RKIPP;
  r168: MEKPP|RP|RKIPP => MEKPP + RP|RKIPP; k168*MEKPP|RP|RKIPP;
  r169: Raf1Star|RP|RKIPP => RKIPP|RP|RKIPP; k169*Raf1Star|RP|RKIPP;
  r170: MEKPP|ERK => MEKPP|ERK|ERK; k170*MEKPP|ERK;
  r171: Raf1Star|RKIP|ERK => MEKPP|ERK|ERK; k171*Raf1Star|RKIP|ERK;
  r172: MEKPP|ERK|Raf1Star => MEKPP|Raf1Star; k172*MEKPP|ERK|Raf1Star;
  r173: MEKPP|ERK|RP|RKIPP => Raf1Star|RKIP|ERKPP|RP|RKIPP; k173*MEKPP|ERK|RP|RKIPP;
  r174: ERKPP|MEKPP|ERK => Raf1Star|RKIP|ERKPP|MEKPP|ERK; k174*ERKPP|MEKPP|ERK;
  r175: ERKPP|RKIPP => MEKPP|ERK|RKIPP; k175*ERKPP|RKIPP;
  r176: Raf1Star|RKIP|ERKPP|MEKPP => MEKPP|ERK|MEKPP; k176*Raf1Star|RKIP|ERKPP|MEKPP;
  r177: MEKPP|Raf1Star => ERKPP|Raf1Star; k177*MEKPP|Raf1Star;
  r178: Raf1Star|RP => Raf1Star + RP; k178*Raf1Star|RP;
  r179: RP|RKIPP + RKIP => RP|RKIPP|RKIP; k179*RP|RKIPP*RKIP;
  r180: ERK + RKIPP => ERK|RKIPP; k180*ERK*RKIPP;
  r181: RKIP|MEKPP|ERK => RKIP + MEKPP|ERK; k181*RKIP|MEKPP|ERK;
  r182: Raf1Star|RKIP|Raf1Star => RP|RKIPP|Raf1Star; k182*Raf1Star|RKIP|Raf1Star;
  r183: MEKPP|ERK|RKIPP => MEKPP|RKIPP; k183*MEKPP|ERK|RKIPP;
  r184: RKIP|ERKPP => RKIPP|ERKPP; k184*RKIP|ERKPP;
  r185: Raf1Star|RKIP|Raf1Star => ERK|Raf1Star; k185*Raf1Star|RKIP|Raf1Star;
  r186: RP + RP|RKIPP => RP|RP|RKIPP; k186*RP*RP|RKIPP;
  r187: ERKPP|MEKPP|ERK => Raf1Star|RKIP|MEKPP|ERK; k187*ERKPP|MEKPP|ERK;
  r188: RP|RP|RKIPP => Raf1Star|RKIP|ERKPP|RP|RKIPP; k188*RP|RP|RKIPP;
  r189: ERKPP|Raf1Star|RKIP|ERKPP => Raf1Star|Raf1Star|RKIP|ERKPP; k189*ERKPP|Raf1Star|RKIP|ERKPP;
  r190: RP|RKIPP|Raf1Star|RKIP => Raf1Star|RKIP|ERKPP|Raf1Star|RKIP; k190*RP|RKIPP|Raf1Star|RKIP;
  r191: RKIP|Raf1Star|RKIP|ERKPP => Raf1Star|Raf1Star|RKIP|ERKPP; k191*RKIP|Raf1Star|RKIP|ERKPP;
  r192: RKIPP|MEKPP|ERK => RKIP|MEKPP|ERK; k192*RKIPP|MEKPP|ERK;
  r193: Raf1Star|RKIP|ERKPP|RKIP => MEKPP|ERK|RKIP; k193*Raf1Star|RKIP|ERKPP|RKIP;
  r194: RKIPP|Raf1Star => RKIP|Raf1Star; k194*RKIPP|Raf1Star;
  r195: ERK|RP|RKIPP => MEKPP|ERK|RP|RKIPP; k195*ERK|RP|RKIPP;
  r196: ERK|Raf1Star => MEKPP|ERK|Raf1Star; k196*ERK|Raf1Star;
  r197: ERKPP|Raf1Star|RKIP => ERKPP + Raf1Star|RKIP; k197*ERKPP|Raf1Star|RKIP;
  r198: ERK|RKIP => Raf1Star|RKIP; k198*ERK|RKIP;
  r199: RP|Raf1Star|RKIP => MEKPP|ERK|Raf1Star|RKIP; k199*RP|Raf1Star|RKIP;
  r200: ERKPP|Raf1Star|RKIP => Raf1Star|Raf1Star|RKIP; k200*ERKPP|Raf1Star|RKIP;
  r201: Raf1Star|RKIP => RP|RKIPP|RKIP; k201*Raf1Star|RKIP;
  r202: ERKPP|Raf1Star|RKIP|ERKPP => Raf1Star|RKIP|Raf1Star|RKIP|ERKPP; k202*ERKPP|Raf1Star|RKIP|ERKPP;
  r203: RP|RKIPP|RKIPP => Raf1Star|RKIPP; k203*RP|RKIPP|RKIPP;
  r204: ERK|RKIP => ERKPP|RKIP; k204*ERK|RKIP;
  r205: ERK|MEKPP => RKIP|MEKPP; k205*ERK|MEKPP;
  r206: Raf1Star|MEKPP|ERK => RP|MEKPP|ERK; k206*Raf1Star|MEKPP|ERK;
  r207: RKIPP|RKIP => RP|RKIP; k207*RKIPP|RKIP;
  r208: RP|RKIPP|Raf1Star|RKIP|ERKPP => MEKPP|Raf1Star|RKIP|ERKPP; k208*RP|RKIPP|Raf1Star|RKIP|ERKPP;
  r209: ERKPP|RP => Raf1Star|RKIP|ERKPP|RP; k209*ERKPP|RP;
  r210: Raf1Star|RP|RKIPP => Raf1Star|RKIP|RP|RKIPP; k210*Raf1Star|RP|RKIPP;
  r211: ERK|RP => Raf1Star|RKIP|ERKPP|RP; k211*ERK|RP;
  r212: RP|RP|RKIPP => RKIPP|RP|RKIPP; k212*RP|RP|RKIPP;
  r213: RKIP|RP => ERKPP|RP; k213*RKIP|RP;
  r214: Raf1Star|RKIP + ERK => Raf1Star|RKIP|ERK; k214*Raf1Star|RKIP*ERK;
  r215: RP|MEKPP|ERK => Raf1Star|RKIP|ERKPP|MEKPP|ERK; k215*RP|MEKPP|ERK;
  r216: RP|RKIPP|MEKPP => ERK|MEKPP; k216*RP|RKIPP|MEKPP;
  r217: MEKPP|RKIPP => RP|RKIPP|RKIPP; k217*MEKPP|RKIPP;
  r218: RP|RKIPP|ERKPP => ERK|ERKPP; k218*RP|RKIPP|ERKPP;
  r219: Raf1Star|RP|RKIPP => RP|RP|RKIPP; k219*Raf1Star|RP|RKIPP;
  r220: ERKPP|ERK => Raf1Star|ERK; k220*ERKPP|ERK;
  r221: RKIP + MEKPP => RKIP|MEKPP; k221*RKIP*MEKPP;
  r222: RKIPP|RKIP => ERKPP|RKIP; k222*RKIPP|RKIP;
  r223: Raf1Star|RKIP|MEKPP|ERK => RP|MEKPP|ERK; k223*Raf1Star|RKIP|MEKPP|ERK;
  r224: ERKPP|MEKPP => RKIP|MEKPP; k224*ERKPP|MEKPP;
  r225: Raf1Star|Raf1Star|RKIP|ERKPP => MEKPP|ERK|Raf1Star|RKIP|ERKPP; k225*Raf1Star|Raf1Star|RKIP|ERKPP;
  r226: RKIP|ERK => MEKPP|ERK; k226*RKIP|ERK;
  r227: Raf1Star|RKIP|ERKPP|Raf1Star|RKIP => RKIP|Raf1Star|RKIP; k227*Raf1Star|RKIP|ERKPP|Raf1Star|RKIP;
  r228: RKIP|ERK => Raf1Star|RKIP|ERKPP|ERK; k228*RKIP|ERK;
  r229: Raf1Star|RKIP|Raf1Star|RKIP|ERKPP => RKIPP|Raf1Star|RKIP|ERKPP; k229*Raf1Star|RKIP|Raf1Star|RKIP|ERKPP;
  r230: RKIPP|Raf1Star|RKIP|ERKPP => RP|RKIPP|Raf1Star|RKIP|ERKPP; k230*RKIPP|Raf1Star|RKIP|ERKPP;
  r231: ERKPP|Raf1Star|RKIP => RP|Raf1Star|RKIP; k231*ERKPP|Raf1Star|RKIP;
  r232: Raf1Star|ERKPP => ERK|ERKPP; k232*Raf1Star|ERKPP;
  r233: RP|RKIPP|Raf1Star|RKIP|ERKPP => ERKPP|Raf1Star|RKIP|ERKPP; k233*RP|RKIPP|Raf1Star|RKIP|ERKPP;
  r234: RKIPP|Raf1Star|RKIP => RP|RKIPP|Raf1Star|RKIP; k234*RKIPP|Raf1Star|RKIP;
  r235: ERKPP|MEKPP|ERK => RP|RKIPP|MEKPP|ERK; k235*ERKPP|MEKPP|ERK;
  r236: RP|RKIPP|MEKPP => RKIP|MEKPP; k236*RP|RKIPP|MEKPP;
  r237: ERKPP|RP|RKIPP => Raf1Star|RKIP|RP|RKIPP; k237*ERKPP|RP|RKIPP;
  r238: MEKPP|RKIPP => Raf1Star|RKIP|ERKPP|RKIPP; k238*MEKPP|RKIPP;
  r239: Raf1Star|RP => MEKPP|RP; k239*Raf1Star|RP;
  r240: MEKPP|Raf1Star|RKIP => Raf1Star|RKIP|ERKPP|Raf1Star|RKIP; k240*MEKPP|Raf1Star|RKIP;
  r241: Raf1Star|Raf1Star|RKIP|ERKPP => MEKPP|Raf1Star|RKIP|ERKPP; k241*Raf1Star|Raf1Star|RKIP|ERKPP;
  r242: ERK|MEKPP|ERK => RP|RKIPP|MEKPP|ERK; k242*ERK|MEKPP|ERK;
  r243: Raf1Star|MEKPP => Raf1Star + MEKPP; k243*Raf1Star|MEKPP;
  r244: Raf1Star|RKIPP => Raf1Star + RKIPP; k244*Raf1Star|RKIPP;
  r245: MEKPP|MEKPP|ERK => RKIP|MEKPP|ERK; k245*MEKPP|MEKPP|ERK;
  r246: MEKPP|ERK|RKIP => MEKPP|ERK + RKIP; k246*MEKPP|ERK|RKIP;
  r247: Raf1Star|RKIP|MEKPP => ERK|MEKPP; k247*Raf1Star|RKIP|MEKPP;
  r248: RP|RKIPP|Raf1Star => RP|Raf1Star; k248*RP|RKIPP|Raf1Star;
  r249: Raf1Star|RKIP|ERKPP|RKIP => MEKPP|RKIP; k249*Raf1Star|RKIP|ERKPP|RKIP;
  r250: RKIP + Raf1Star => RKIP|Raf1Star; k250*RKIP*Raf1Star;
  r251: RP|RKIPP|Raf1Star => RKIP|Raf1Star; k251*RP|RKIPP|Raf1Star;
  r252: MEKPP + Raf1Star => MEKPP|Raf1Star; k252*MEKPP*Raf1Star;
  r253: ERK|MEKPP|ERK => RP|MEKPP|ERK; k253*ERK|MEKPP|ERK;
  r254: RP|ERK => RKIPP|ERK; k254*RP|ERK;
  r255: Raf1Star|RP|RKIPP => MEKPP|RP|RKIPP; k255*Raf1Star|RP|RKIPP;
  r256: ERKPP|Raf1Star|RKIP|ERKPP => RKIP|Raf1Star|RKIP|ERKPP; k256*ERKPP|Raf1Star|RKIP|ERKPP;
  r257: RP|RKIPP => MEKPP|RKIPP; k257*RP|RKIPP;
  r258: RKIPP|ERK => ERKPP|ERK; k258*RKIPP|ERK;
  r259: MEKPP|RKIP => MEKPP + RKIP; k259*MEKPP|RKIP;
  r260: RP|RKIPP|Raf1Star|RKIP|ERKPP => RKIP|Raf1Star|RKIP|ERKPP; k260*RP|RKIPP|Raf1Star|RKIP|ERKPP;
  r261: RKIP|MEKPP => Raf1Star|MEKPP; k261*RKIP|MEKPP;
  r262: RP|RKIPP|RKIP => RKIPP|RKIP; k262*RP|RKIPP|RKIP;
  r263: Raf1Star|RKIP|MEKPP|ERK => Raf1Star|RKIP|ERKPP|MEKPP|ERK; k263*Raf1Star|RKIP|MEKPP|ERK;
  r264: RP|RKIPP|RP => ERKPP|RP; k264*RP|RKIPP|RP;
  r265: MEKPP|MEKPP|ERK => RP|RKIPP|MEKPP|ERK; k265*MEKPP|MEKPP|ERK;
  r266: RKIPP|Raf1Star => Raf1Star|RKIP|ERKPP|Raf1Star; k266*RKIPP|Raf1Star;
  r267: Raf1Star|Raf1Star|RKIP|ERKPP => ERK|Raf1Star|RKIP|ERKPP; k267*Raf1Star|Raf1Star|RKIP|ERKPP;
  r268: RP|RKIPP|ERK => RKIP|ERK; k268*RP|RKIPP|ERK;
  r269: RKIPP|MEKPP|ERK => Raf1Star|RKIP|MEKPP|ERK; k269*RKIPP|MEKPP|ERK;
  r270: Raf1Star|RKIP + RKIP => Raf1Star|RKIP|RKIP; k270*Raf1Star|RKIP*RKIP;
  r271: RKIPP|Raf1Star|RKIP|ERKPP => ERK|Raf1Star|RKIP|ERKPP; k271*RKIPP|Raf1Star|RKIP|ERKPP;
  r272: RP|RKIPP|RKIP => RP|RKIPP + RKIP; k272*RP|RKIPP|RKIP;
  r273: ERK|MEKPP => MEKPP|ERK|MEKPP; k273*ERK|MEKPP;
  r274: ERKPP|ERK => MEKPP|ERK; k274*ERKPP|ERK;
  r275: Raf1Star|RKIP|ERK => RKIPP|ERK; k275*Raf1Star|RKIP|ERK;
  r276: ERKPP|MEKPP|ERK => ERK|MEKPP|ERK; k276*ERKPP|MEKPP|ERK;
  r277: MEKPP|ERK|RKIPP => Raf1Star|RKIP|ERKPP|RKIPP; k277*MEKPP|ERK|RKIPP;
  r278: ERK|MEKPP|ERK => Raf1Star|RKIP|MEKPP|ERK; k278*ERK|MEKPP|ERK;
  r279: MEKPP|ERK|RKIPP => ERKPP|RKIPP; k279*MEKPP|ERK|RKIPP;
  r280: Raf1Star|RKIP|ERKPP|RP|RKIPP => MEKPP|ERK|RP|RKIPP; k280*Raf1Star|RKIP|ERKPP|RP|RKIPP;
  r281: MEKPP|MEKPP|ERK => ERK|MEKPP|ERK; k281*MEKPP|MEKPP|ERK;
  r282: MEKPP|ERK + RP|RKIPP => MEKPP|ERK|RP|RKIPP; k282*MEKPP|ERK*RP|RKIPP;
  r283: ERKPP + Raf1Star => ERKPP|Raf1Star; k283*ERKPP*Raf1Star;
  r284: MEKPP|RP|RKIPP => MEKPP|ERK|RP|RKIPP; k284*MEKPP|RP|RKIPP;
  r285: Raf1Star|ERK => RP|ERK; k285*Raf1Star|ERK;
  r286: MEKPP|Raf1Star => RP|Raf1Star; k286*MEKPP|Raf1Star;
  r287: MEKPP|RP|RKIPP => RP|RP|RKIPP; k287*MEKPP|RP|RKIPP;
  r288: MEKPP|ERK|ERK => MEKPP|ERK; k288*MEKPP|ERK|ERK;
  r289: RP|RKIP => RP|RKIPP|RKIP; k289*RP|RKIP;
  r290: Raf1Star|RKIP|ERKPP + Raf1Star|RKIP => Raf1Star|RKIP|ERKPP|Raf1Star|RKIP; k290*Raf1Star|RKIP|ERKPP*Raf1Star|RKIP;
  r291: RKIPP|ERKPP => RKIP|ERKPP; k291*RKIPP|ERKPP;
  r292: Raf1Star|RKIP|ERKPP|Raf1Star => RP|Raf1Star; k292*Raf1Star|RKIP|ERKPP|Raf1Star;
  r293: Raf1Star|RKIP|ERKPP|RP|RKIPP => RP|RP|RKIPP; k293*Raf1Star|RKIP|ERKPP|RP|RKIPP;
  r294: RP|RP|RKIPP => RP + RP|RKIPP; k294*RP|RP|RKIPP;
  r295: RP|Raf1Star|RKIP => RP + Raf1Star|RKIP; k295*RP|Raf1Star|RKIP;
  r296: ERKPP|RKIPP => Raf1Star|RKIPP; k296*ERKPP|RKIPP;
  r297: RKIP + MEKPP|ERK => RKIP|MEKPP|ERK; k297*RKIP*MEKPP|ERK;
  r298: MEKPP|RKIPP => MEKPP|ERK|RKIPP; k298*MEKPP|RKIPP;
  r299: ERK|RKIPP => ERK + RKIPP; k299*ERK|RKIPP;
  r300: MEKPP|ERK|Raf1Star|RKIP => Raf1Star|Raf1Star|RKIP; k300*MEKPP|ERK|Raf1Star|RKIP;
  r301: MEKPP|ERK|Raf1Star|RKIP => RP|Raf1Star|RKIP; k301*MEKPP|ERK|Raf1Star|RKIP;
  r302: RP|Raf1Star|RKIP|ERKPP => RKIPP|Raf1Star|RKIP|ERKPP; k302*RP|Raf1Star|RKIP|ERKPP;
  r303: Raf1Star|RKIP|RP => Raf1Star|RKIP + RP; k303*Raf1Star|RKIP|RP;
  r304: MEKPP|Raf1Star|RKIP => RP|Raf1Star|RKIP; k304*MEKPP|Raf1Star|RKIP;
  r305: RKIP|Raf1Star => RKIPP|Raf1Star; k305*RKIP|Raf1Star;
  r306: MEKPP|ERK|RP|RKIPP => ERK|RP|RKIPP; k306*MEKPP|ERK|RP|RKIPP;
  r307: MEKPP|ERK|Raf1Star => ERK|Raf1Star; k307*MEKPP|ERK|Raf1Star;
  r308: ERK|RP|RKIPP => RP|RP|RKIPP; k308*ERK|RP|RKIPP;
  r309: ERKPP + MEKPP|ERK => ERKPP|MEKPP|ERK; k309*ERKPP*MEKPP|ERK;
  r310: ERK + MEKPP|ERK => ERK|MEKPP|ERK; k310*ERK*MEKPP|ERK;
  r311: MEKPP|RKIP => RKIPP|RKIP; k311*MEKPP|RKIP;
  r312: MEKPP|ERK|MEKPP => RP|MEKPP; k312*MEKPP|ERK|MEKPP;
  r313: RP|MEKPP|ERK => RKIP|MEKPP|ERK; k313*RP|MEKPP|ERK;
  r314: ERK|RKIP => Raf1Star|RKIP|RKIP; k314*ERK|RKIP;
  r315: RP|RKIPP|ERKPP => MEKPP|ERK|ERKPP; k315*RP|RKIPP|ERKPP;
  r316: MEKPP|ERK|RP => Raf1Star|RKIP|ERKPP|RP; k316*MEKPP|ERK|RP;
  r317: MEKPP|Raf1Star|RKIP|ERKPP => RKIPP|Raf1Star|RKIP|ERKPP; k317*MEKPP|Raf1Star|RKIP|ERKPP;
  r318: RP|RKIPP|MEKPP => RKIPP|MEKPP; k318*RP|RKIPP|MEKPP;
  r319: RP|RKIP => MEKPP|ERK|RKIP; k319*RP|RKIP;
  r320: RKIP|Raf1Star|RKIP|ERKPP => RP|Raf1Star|RKIP|ERKPP; k320*RKIP|Raf1Star|RKIP|ERKPP;
  r321: RKIPP|ERKPP => RKIPP + ERKPP; k321*RKIPP|ERKPP;
  r322: RP|RKIPP|ERKPP => Raf1Star|RKIP|ERKPP|ERKPP; k322*RP|RKIPP|ERKPP;
  r323: RP + MEKPP => RP|MEKPP; k323*RP*MEKPP;
  r324: RKIPP|Raf1Star|RKIP => ERKPP|Raf1Star|RKIP; k324*RKIPP|Raf1Star|RKIP;
  r325: RKIPP|Raf1Star => MEKPP|ERK|Raf1Star; k325*RKIPP|Raf1Star;
  r326: RKIPP|RP|RKIPP => MEKPP|ERK|RP|RKIPP; k326*RKIPP|RP|RKIPP;
  r327: ERK|Raf1Star|RKIP|ERKPP => RKIP|Raf1Star|RKIP|ERKPP; k327*ERK|Raf1Star|RKIP|ERKPP;
  r328: RP|RKIPP|ERK => MEKPP|ERK; k328*RP|RKIPP|ERK;
  r329: RKIPP + RKIP => RKIPP|RKIP; k329*RKIPP*RKIP;
  r330: ERKPP|MEKPP => RKIPP|MEKPP; k330*ERKPP|MEKPP;
  r331: ERK|MEKPP => ERKPP|MEKPP; k331*ERK|MEKPP;
  r332: Raf1Star|RP => MEKPP|ERK|RP; k332*Raf1Star|RP;
  r333: Raf1Star|RKIP|MEKPP => RKIP|MEKPP; k333*Raf1Star|RKIP|MEKPP;
  r334: RKIP|MEKPP|ERK => Raf1Star|RKIP|ERKPP|MEKPP|ERK; k334*RKIP|MEKPP|ERK;
  r335: Raf1Star|RKIP|ERKPP => MEKPP|ERKPP; k335*Raf1Star|RKIP|ERKPP;
  r336: Raf1Star|RP|RKIPP => ERK|RP|RKIPP; k336*Raf1Star|RP|RKIPP;
  r337: RP|RKIPP|ERK => ERKPP|ERK; k337*RP|RKIPP|ERK;
  r338: Raf1Star|RKIP|ERKPP|RP|RKIPP => MEKPP|RP|RKIPP; k338*Raf1Star|RKIP|ERKPP|RP|RKIPP;
  r339: RP|Raf1Star|RKIP|ERKPP => RP + Raf1Star|RKIP|ERKPP; k339*RP|Raf1Star|RKIP|ERKPP;
  r340: RKIP|RKIPP => Raf1Star|RKIP|ERKPP|RKIPP; k340*RKIP|RKIPP;
  r341: RKIP|ERKPP => Raf1Star|RKIP|ERKPP|ERKPP; k341*RKIP|ERKPP;
  r342: RP|Raf1Star => RKIP|Raf1Star; k342*RP|Raf1Star;
  r343: Raf1Star|RKIP|ERKPP|RP|RKIPP => RKIP|RP|RKIPP; k343*Raf1Star|RKIP|ERKPP|RP|RKIPP;
  r344: ERKPP + RKIPP => ERKPP|RKIPP; k344*ERKPP*RKIPP;
  r345: Raf1Star|RKIP|ERK => Raf1Star|ERK; k345*Raf1Star|RKIP|ERK;
  r346: Raf1Star|RKIP|ERKPP => RP|RKIPP|ERKPP; k346*Raf1Star|RKIP|ERKPP;
  r347: RKIPP|Raf1Star|RKIP|ERKPP => ERKPP|Raf1Star|RKIP|ERKPP; k347*RKIPP|Raf1Star|RKIP|ERKPP;
  r348: MEKPP|ERK|Raf1Star|RKIP|ERKPP => RP|Raf1Star|RKIP|ERKPP; k348*MEKPP|ERK|Raf1Star|RKIP|ERKPP;
  r349: ERKPP|RP|RKIPP => RKIPP|RP|RKIPP; k349*ERKPP|RP|RKIPP;
  r350: RKIP|MEKPP|ERK => RP|RKIPP|MEKPP|ERK; k350*RKIP|MEKPP|ERK;
  r351: ERKPP|Raf1Star => MEKPP|ERK|Raf1Star; k351*ERKPP|Raf1Star;
  r352: MEKPP|ERK|ERKPP => Raf1Star|ERKPP; k352*MEKPP|ERK|ERKPP;
  r353: RP|RKIPP|MEKPP => RP|MEKPP; k353*RP|RKIPP|MEKPP;
  r354: ERKPP|RP|RKIPP => MEKPP|ERK|RP|RKIPP; k354*ERKPP|RP|RKIPP;
  r355: RP|RKIPP|ERKPP => RP|ERKPP; k355*RP|RKIPP|ERKPP;
  r356: MEKPP|RP|RKIPP => ERK|RP|RKIPP; k356*MEKPP|RP|RKIPP;
  r357: RKIP|RP => RKIPP|RP; k357*RKIP|RP;
  r358: Raf1Star|RKIP|Raf1Star|RKIP|ERKPP => RP|RKIPP|Raf1Star|RKIP|ERKPP; k358*Raf1Star|RKIP|Raf1Star|RKIP|ERKPP;
  r359: MEKPP|ERK|Raf1Star|RKIP => RKIPP|Raf1Star|RKIP; k359*MEKPP|ERK|Raf1Star|RKIP;
  r360: ERKPP|Raf1Star|RKIP => RP|RKIPP|Raf1Star|RKIP; k360*ERKPP|Raf1Star|RKIP;
  r361: RKIP|RP => ERK|RP; k361*RKIP|RP;
  r362: Raf1Star|RKIP|Raf1Star|RKIP|ERKPP => RKIP|Raf1Star|RKIP|ERKPP; k362*Raf1Star|RKIP|Raf1Star|RKIP|ERKPP;
  r363: MEKPP|ERK|ERKPP => RKIPP|ERKPP; k363*MEKPP|ERK|ERKPP;
  r364: Raf1Star|RKIP|ERKPP|ERKPP => Raf1Star|RKIP|ERKPP + ERKPP; k364*Raf1Star|RKIP|ERKPP|ERKPP;
  r365: Raf1Star|RKIP|ERKPP|RP => MEKPP|RP; k365*Raf1Star|RKIP|ERKPP|RP;
  r366: Raf1Star|RKIP|MEKPP => RP|MEKPP; k366*Raf1Star|RKIP|MEKPP;
  r367: MEKPP|MEKPP|ERK => RKIPP|MEKPP|ERK; k367*MEKPP|MEKPP|ERK;
  r368: Raf1Star|RKIP|ERKPP|RP => RKIP|RP; k368*Raf1Star|RKIP|ERKPP|RP;
  r369: MEKPP|RKIP => MEKPP|ERK|RKIP; k369*MEKPP|RKIP;
  r370: MEKPP|Raf1Star|RKIP => RKIP|Raf1Star|RKIP; k370*MEKPP|Raf1Star|RKIP;
  r371: MEKPP|RKIP => RP|RKIPP|RKIP; k371*MEKPP|RKIP;
  r372: MEKPP|ERK|MEKPP => Raf1Star|RKIP|MEKPP; k372*MEKPP|ERK|MEKPP;
  r373: MEKPP|ERK|Raf1Star|RKIP => MEKPP|ERK + Raf1Star|RKIP; k373*MEKPP|ERK|Raf1Star|RKIP;
  r374: RKIPP|ERK => MEKPP|ERK|ERK; k374*RKIPP|ERK;
  r375: RKIPP|ERK => RP|RKIPP|ERK; k375*RKIPP|ERK;
  r376: RKIP|ERK => RKIPP|ERK; k376*RKIP|ERK;
  r377: MEKPP|ERK + ERKPP => MEKPP|ERK|ERKPP; k377*MEKPP|ERK*ERKPP;
  r378: ERK + Raf1Star|RKIP|ERKPP => ERK|Raf1Star|RKIP|ERKPP; k378*ERK*Raf1Star|RKIP|ERKPP;
  r379: Raf1Star|RKIP|ERKPP|ERK => Raf1Star|RKIP|ERKPP + ERK; k379*Raf1Star|RKIP|ERKPP|ERK;
  r380: RKIPP|Raf1Star => Raf1Star|RKIP|Raf1Star; k380*RKIPP|Raf1Star;
  r381: Raf1Star|RKIP|MEKPP => RKIPP|MEKPP; k381*Raf1Star|RKIP|MEKPP;
  r382: Raf1Star|RKIP|ERKPP => RKIPP|ERKPP; k382*Raf1Star|RKIP|ERKPP;
  r383: MEKPP|ERK|ERK => ERKPP|ERK; k383*MEKPP|ERK|ERK;
  r384: RP|Raf1Star|RKIP|ERKPP => Raf1Star|Raf1Star|RKIP|ERKPP; k384*RP|Raf1Star|RKIP|ERKPP;
  r385: Raf1Star|RKIP|ERKPP|ERK => RKIPP|ERK; k385*Raf1Star|RKIP|ERKPP|ERK;
  r386: RKIPP|RP => MEKPP|RP; k386*RKIPP|RP;
  r387: RP|Raf1Star => MEKPP|ERK|Raf1Star; k387*RP|Raf1Star;
  r388: RP|RP|RKIPP => MEKPP|ERK|RP|RKIPP; k388*RP|RP|RKIPP;
  r389: MEKPP|Raf1Star|RKIP|ERKPP => RKIP|Raf1Star|RKIP|ERKPP; k389*MEKPP|Raf1Star|RKIP|ERKPP;
  r390: ERK|MEKPP => RKIPP|MEKPP; k390*ERK|MEKPP;
  r391: RKIPP|Raf1Star|RKIP => RKIP|Raf1Star|RKIP; k391*RKIPP|Raf1Star|RKIP;
  r392: RKIPP|Raf1Star|RKIP|ERKPP => RKIP|Raf1Star|RKIP|ERKPP; k392*RKIPP|Raf1Star|RKIP|ERKPP;
  r393: MEKPP + MEKPP|ERK => MEKPP|MEKPP|ERK; k393*MEKPP*MEKPP|ERK;
  r394: RP|RKIPP + ERKPP => RP|RKIPP|ERKPP; k394*RP|RKIPP*ERKPP;
  r395: RP|RKIPP + RKIPP => RP|RKIPP|RKIPP; k395*RP|RKIPP*RKIPP;
  r396: RP|RKIPP + MEKPP => RP|RKIPP|MEKPP; k396*RP|RKIPP*MEKPP;
  r397: RKIPP|RP => Raf1Star|RKIP|RP; k397*RKIPP|RP;
  r398: ERK|Raf1Star|RKIP => RKIPP|Raf1Star|RKIP; k398*ERK|Raf1Star|RKIP;
  r399: RP|RKIPP|RP => MEKPP|ERK|RP; k399*RP|RKIPP|RP;
  r400: MEKPP|Raf1Star => Raf1Star|RKIP|Raf1Star; k400*MEKPP|Raf1Star;
  r401: Raf1Star|RKIP|ERKPP => Raf1Star|ERKPP; k401*Raf1Star|RKIP|ERKPP;
  r402: Raf1Star|RKIP|MEKPP => Raf1Star|MEKPP; k402*Raf1Star|RKIP|MEKPP;
  r403: ERK|RKIPP => Raf1Star|RKIP|ERKPP|RKIPP; k403*ERK|RKIPP;
  r404: ERK|MEKPP => Raf1Star|RKIP|ERKPP|MEKPP; k404*ERK|MEKPP;
  r405: MEKPP|ERK|ERKPP => RKIP|ERKPP; k405*MEKPP|ERK|ERKPP;
  r406: RKIPP|RP|RKIPP => MEKPP|RP|RKIPP; k406*RKIPP|RP|RKIPP;
  r407: Raf1Star|RKIP|RKIPP => Raf1Star|RKIP + RKIPP; k407*Raf1Star|RKIP|RKIPP;
  r408: RKIPP|RKIP => MEKPP|ERK|RKIP; k408*RKIPP|RKIP;
  r409: RP|RKIPP + ERK => RP|RKIPP|ERK; k409*RP|RKIPP*ERK;
  r410: Raf1Star|RP|RKIPP => Raf1Star|RKIP|ERKPP|RP|RKIPP; k410*Raf1Star|RP|RKIPP;
  r411: MEKPP|Raf1Star|RKIP|ERKPP => ERK|Raf1Star|RKIP|ERKPP; k411*MEKPP|Raf1Star|RKIP|ERKPP;
  r412: ERKPP|MEKPP|ERK => RKIPP|MEKPP|ERK; k412*ERKPP|MEKPP|ERK;
  r413: RKIPP|RP|RKIPP => RKIPP + RP|RKIPP; k413*RKIPP|RP|RKIPP;
  r414: Raf1Star|RKIP|MEKPP|ERK => RKIP|MEKPP|ERK; k414*Raf1Star|RKIP|MEKPP|ERK;
  r415: RP|ERK => Raf1Star|RKIP|ERK; k415*RP|ERK;
  r416: Raf1Star|RKIP|MEKPP => Raf1Star|RKIP|ERKPP|MEKPP; k416*Raf1Star|RKIP|MEKPP;
  r417: Raf1Star|RKIP|RKIPP => Raf1Star|RKIP|ERKPP|RKIPP; k417*Raf1Star|RKIP|RKIPP;
  r418: MEKPP|ERK|Raf1Star => RKIPP|Raf1Star; k418*MEKPP|ERK|Raf1Star;
  r419: RP|MEKPP => RP + MEKPP; k419*RP|MEKPP;
  r420: RKIP|RP => Raf1Star|RKIP|RP; k420*RKIP|RP;
  r421: RP|MEKPP => MEKPP|ERK|MEKPP; k421*RP|MEKPP;
  r422: Raf1Star|ERKPP => Raf1Star|RKIP|ERKPP|ERKPP; k422*Raf1Star|ERKPP;
  r423: RP + Raf1Star|RKIP|ERKPP => RP|Raf1Star|RKIP|ERKPP; k423*RP*Raf1Star|RKIP|ERKPP;
  r424: Raf1Star|RKIP|ERKPP|MEKPP|ERK => RKIP|MEKPP|ERK; k424*Raf1Star|RKIP|ERKPP|MEKPP|ERK;
  r425: MEKPP|ERK|RP => Raf1Star|RP; k425*MEKPP|ERK|RP;
  r426: Raf1Star|RKIP|ERK => ERKPP|ERK; k426*Raf1Star|RKIP|ERK;
  r427: Raf1Star|Raf1Star|RKIP => RKIPP|Raf1Star|RKIP; k427*Raf1Star|Raf1Star|RKIP;
  r428: RKIPP|Raf1Star => ERK|Raf1Star; k428*RKIPP|Raf1Star;
  r429: ERK|Raf1Star => MEKPP|Raf1Star; k429*ERK|Raf1Star;
  r430: RKIP|RKIPP => RP|RKIPP; k430*RKIP|RKIPP;
  r431: RP|MEKPP => Raf1Star|RKIP|MEKPP; k431*RP|MEKPP;
  r432: MEKPP|Raf1Star|RKIP => ERKPP|Raf1Star|RKIP; k432*MEKPP|Raf1Star|RKIP;
  r433: RP|Raf1Star|RKIP|ERKPP => ERKPP|Raf1Star|RKIP|ERKPP; k433*RP|Raf1Star|RKIP|ERKPP;
  r434: Raf1Star|RKIP|ERKPP + ERK => Raf1Star|RKIP|ERKPP|ERK; k434*Raf1Star|RKIP|ERKPP*ERK;
  r435: MEKPP|ERK|RKIP => ERKPP|RKIP; k435*MEKPP|ERK|RKIP;
  r436: Raf1Star|RKIP|MEKPP => MEKPP|ERK|MEKPP; k436*Raf1Star|RKIP|MEKPP;
  r437: ERK|MEKPP|ERK => Raf1Star|RKIP|ERKPP|MEKPP|ERK; k437*ERK|MEKPP|ERK;
  r438: RP|MEKPP|ERK => MEKPP|MEKPP|ERK; k438*RP|MEKPP|ERK;
  r439: MEKPP|RP => RKIPP|RP; k439*MEKPP|RP;
  r440: Raf1Star|ERKPP => RKIPP|ERKPP; k440*Raf1Star|ERKPP;
  r441: MEKPP|Raf1Star => RKIPP|Raf1Star; k441*MEKPP|Raf1Star;
  r442: ERKPP|MEKPP => ERK|MEKPP; k442*ERKPP|MEKPP;
  r443: Raf1Star|RKIP|RP => RKIPP|RP; k443*Raf1Star|RKIP|RP;
  r444: Raf1Star|ERKPP => RP|RKIPP|ERKPP; k444*Raf1Star|ERKPP;
  r445: Raf1Star|Raf1Star|RKIP => ERKPP|Raf1Star|RKIP; k445*Raf1Star|Raf1Star|RKIP;
  r446: RKIP|RKIPP => ERKPP|RKIPP; k446*RKIP|RKIPP;
  r447: RP|RP|RKIPP => Raf1Star|RP|RKIPP; k447*RP|RP|RKIPP;
  r448: Raf1Star|RKIP|ERK => MEKPP|ERK; k448*Raf1Star|RKIP|ERK;
  r449: Raf1Star|RKIP|ERKPP|ERK => RP|RKIPP|ERK; k449*Raf1Star|RKIP|ERKPP|ERK;
  r450: ERKPP|RKIPP => MEKPP|RKIPP; k450*ERKPP|RKIPP;
  r451: ERK|MEKPP => Raf1Star|MEKPP; k451*ERK|MEKPP;
  r452: RP|RKIPP|Raf1Star|RKIP|ERKPP => RKIPP|Raf1Star|RKIP|ERKPP; k452*RP|RKIPP|Raf1Star|RKIP|ERKPP;
  r453: RKIP|MEKPP|ERK => MEKPP|MEKPP|ERK; k453*RKIP|MEKPP|ERK;
  r454: Raf1Star|RKIP|ERKPP|RP => Raf1Star|RKIP|RP; k454*Raf1Star|RKIP|ERKPP|RP;
  r455: RKIP|ERK => RP|RKIPP|ERK; k455*RKIP|ERK;
  r456: RP + MEKPP|ERK => RP|MEKPP|ERK; k456*RP*MEKPP|ERK;
  r457: MEKPP|ERK|RKIP => RP|RKIPP|RKIP; k457*MEKPP|ERK|RKIP;
  r458: Raf1Star|RKIP|ERKPP|Raf1Star|RKIP => MEKPP|ERK|Raf1Star|RKIP; k458*Raf1Star|RKIP|ERKPP|Raf1Star|RKIP;
  r459: Raf1Star|RKIP|MEKPP|ERK => ERK|MEKPP|ERK; k459*Raf1Star|RKIP|MEKPP|ERK;
  r460: MEKPP|ERK|Raf1Star => Raf1Star|RKIP|ERKPP|Raf1Star; k460*MEKPP|ERK|Raf1Star;
  r461: Raf1Star|RKIP|ERKPP|RKIPP => MEKPP|ERK|RKIPP; k461*Raf1Star|RKIP|ERKPP|RKIPP;
  r462: MEKPP|ERK => ERKPP|ERK; k462*MEKPP|ERK;
  r463: ERK + MEKPP => ERK|MEKPP; k463*ERK*MEKPP;
  r464: Raf1Star|ERK => MEKPP|ERK; k464*Raf1Star|ERK;
  r465: Raf1Star|ERKPP => RP|ERKPP; k465*Raf1Star|ERKPP;
  r466: Raf1Star|RKIP|ERKPP|MEKPP => RP|MEKPP; k466*Raf1Star|RKIP|ERKPP|MEKPP;
  r467: ERK + RP|RKIPP => ERK|RP|RKIPP; k467*ERK*RP|RKIPP;
  r468: RKIPP|RKIP => Raf1Star|RKIP|ERKPP|RKIP; k468*RKIPP|RKIP;
  r469: RP|RKIPP|MEKPP => Raf1Star|MEKPP; k469*RP|RKIPP|MEKPP;
  r470: MEKPP|ERK|ERK => RP|ERK; k470*MEKPP|ERK|ERK;
  r471: Raf1Star|RKIP|ERKPP|ERK => MEKPP|ERK|ERK; k471*Raf1Star|RKIP|ERKPP|ERK;
  r472: MEKPP|Raf1Star|RKIP|ERKPP => MEKPP|ERK|Raf1Star|RKIP|ERKPP; k472*MEKPP|Raf1Star|RKIP|ERKPP;
  r473: ERK|Raf1Star|RKIP|ERKPP => MEKPP|ERK|Raf1Star|RKIP|ERKPP; k473*ERK|Raf1Star|RKIP|ERKPP;
  r474: Raf1Star|RP => RKIP|RP; k474*Raf1Star|RP;
  r475: Raf1Star|RKIP|ERKPP|MEKPP|ERK => RP|RKIPP|MEKPP|ERK; k475*Raf1Star|RKIP|ERKPP|MEKPP|ERK;
  r476: Raf1Star|Raf1Star|RKIP => MEKPP|Raf1Star|RKIP; k476*Raf1Star|Raf1Star|RKIP;
  r477: Raf1Star|RP => Raf1Star|RKIP|ERKPP|RP; k477*Raf1Star|RP;
  r478: MEKPP + ERKPP => MEKPP|ERKPP; k478*MEKPP*ERKPP;
  r479: RKIP|Raf1Star|RKIP => RP|Raf1Star|RKIP; k479*RKIP|Raf1Star|RKIP;
  r480: Raf1Star|Raf1Star|RKIP => Raf1Star|RKIP|ERKPP|Raf1Star|RKIP; k480*Raf1Star|Raf1Star|RKIP;
  r481: Raf1Star|RKIP|ERKPP|RKIP => Raf1Star|RKIP|RKIP; k481*Raf1Star|RKIP|ERKPP|RKIP;
  r482: Raf1Star|RKIP|ERKPP => ERK|ERKPP; k482*Raf1Star|RKIP|ERKPP;
  r483: RP|MEKPP|ERK => RP + MEKPP|ERK; k483*RP|MEKPP|ERK;
  r484: Raf1Star|RKIP => Raf1Star + RKIP; k484*Raf1Star|RKIP;
  r485: ERK|Raf1Star|RKIP|ERKPP => RP|Raf1Star|RKIP|ERKPP; k485*ERK|Raf1Star|RKIP|ERKPP;
  r486: ERK|ERKPP => MEKPP|ERK|ERKPP; k486*ERK|ERKPP;
  r487: Raf1Star|RKIP|ERKPP|Raf1Star => ERK|Raf1Star; k487*Raf1Star|RKIP|ERKPP|Raf1Star;
  r488: ERKPP|MEKPP => Raf1Star|RKIP|ERKPP|MEKPP; k488*ERKPP|MEKPP;
  r489: Raf1Star|Raf1Star|RKIP|ERKPP => RKIP|Raf1Star|RKIP|ERKPP; k489*Raf1Star|Raf1Star|RKIP|ERKPP;
  r490: RKIPP|Raf1Star|RKIP|ERKPP => Raf1Star|Raf1Star|RKIP|ERKPP; k490*RKIPP|Raf1Star|RKIP|ERKPP;
  r491: ERKPP|RP|RKIPP => RKIP|RP|RKIPP; k491*ERKPP|RP|RKIPP;
  r492: RP|RKIPP|RKIPP => ERKPP|RKIPP; k492*RP|RKIPP|RKIPP;
  r493: ERK|Raf1Star => ERK + Raf1Star; k493*ERK|Raf1Star;
  r494: RP|RKIPP|Raf1Star => RP|RKIPP + Raf1Star; k494*RP|RKIPP|Raf1Star;
  r495: Raf1Star|RKIP|ERKPP|MEKPP => Raf1Star|MEKPP; k495*Raf1Star|RKIP|ERKPP|MEKPP;
  r496: RKIPP|Raf1Star => RP|RKIPP|Raf1Star; k496*RKIPP|Raf1Star;
  r497: MEKPP|Raf1Star|RKIP => RP|RKIPP|Raf1Star|RKIP; k497*MEKPP|Raf1Star|RKIP;
  r498: Raf1Star|RKIP|ERKPP|RP|RKIPP => Raf1Star|RKIP|RP|RKIPP; k498*Raf1Star|RKIP|ERKPP|RP|RKIPP;
  r499: Raf1Star + Raf1Star|RKIP|ERKPP => Raf1Star|Raf1Star|RKIP|ERKPP; k499*Raf1Star*Raf1Star|RKIP|ERKPP;
  r500: RP|MEKPP|ERK => RP|RKIPP|MEKPP|ERK; k500*RP|MEKPP|ERK;
  r501: ERKPP + MEKPP => ERKPP|MEKPP; k501*ERKPP*MEKPP;
  r502: Raf1Star|RKIP|ERKPP|ERK => MEKPP|ERK; k502*Raf1Star|RKIP|ERKPP|ERK;
  r503: ERKPP|RP => MEKPP|ERK|RP; k503*ERKPP|RP;
  r504: MEKPP|ERK|Raf1Star => Raf1Star|RKIP|Raf1Star; k504*MEKPP|ERK|Raf1Star;
  r505: Raf1Star|RKIP|RKIP => ERKPP|RKIP; k505*Raf1Star|RKIP|RKIP;
  r506: MEKPP|RP => Raf1Star|RKIP|RP; k506*MEKPP|RP;
  r507: Raf1Star|RKIP|ERKPP + RKIP => Raf1Star|RKIP|ERKPP|RKIP; k507*Raf1Star|RKIP|ERKPP*RKIP;
  r508: Raf1Star|Raf1Star|RKIP => ERK|Raf1Star|RKIP; k508*Raf1Star|Raf1Star|RKIP;
  r509: Raf1Star|RKIP|ERK => RKIP|ERK; k509*Raf1Star|RKIP|ERK;
  r510: MEKPP|ERK|Raf1Star|RKIP => ERK|Raf1Star|RKIP; k510*MEKPP|ERK|Raf1Star|RKIP;
  r511: ERKPP|RP => ERKPP + RP; k511*ERKPP|RP;
  r512: Raf1Star|RKIP|ERKPP|Raf1Star|RKIP => Raf1Star|RKIP|ERKPP + Raf1Star|RKIP; k512*Raf1Star|RKIP|ERKPP|Raf1Star|RKIP;
end
